"""
This module defines the Camera class, which represents the Emio camera positioned as it would be on the real device.

The `camera.py` file also includes an example usage. You can test it by running the script with the `runSofa` command:
```bash
runSofa -l SofaPython3,SofaImGui -g imgui camera.py
```
"""

import Sofa
from utils import RGBAColor
from splib3.loaders import getLoadingLocation
from math import pi, cos
from splib3.numerics import Quat, to_degrees
import parameters as params


class Camera(Sofa.Prefab):
    """
    Represents the Emio camera in the simulation.

    This class adds the camera to the simulation and provides its position (`torealtranslation`)
    and orientation (`torealrotation`) relative to the real device. The camera can be configured
    in two modes:

    - compact: The camera is oriented upwards.
    - extended: The camera is oriented downwards.

    By default, the camera is added to the Emio class.

    Class Variables:
        - `extended` (`bool`): Specifies the configuration of the camera. `True` for extended mode, `False` for compact mode.

    Example Usage:
    ```python
    from camera import Camera

    def createScene(root):
        camera = root.addChild(Camera(extended=True))
        print("Camera Translation:", camera.torealtranslation)
        print("Camera Rotation:", camera.torealrotation)
    ```
    """
    prefabParameters = [
        {'name': 'extended', 'type': 'bool', 'help': 'configuration of Emio, true for extended, false for compact', 'default': True},
    ]

    def __init__(self, *args, **kwargs):
        Sofa.Prefab.__init__(self, *args, **kwargs)

        self.support = None

        self.addObject('RequiredPlugin', name='Sofa.Component.IO.Mesh') # Needed to use components [MeshSTLLoader]
        self.addObject('RequiredPlugin', name='Sofa.GL.Component.Rendering3D') # Needed to use components [OglModel]

        q = Quat()
        q.rotateFromQuat(Quat.createFromAxisAngle([0., 1., 0.], -pi / 4.))
        q.rotateFromQuat(Quat.createFromAxisAngle([0., 0., 1.], pi / 4. if self.extended.value else 3 * pi / 4.))
        q.rotateFromQuat(Quat.createFromAxisAngle([1., 0., 0.], pi / 2.))
        rotation = to_degrees(q.getEulerAngles())
        t = cos(pi / 4.) * params.cameraTranslation[0]
        self.torealtranslation = [-t, -params.cameraTranslation[1] if self.extended.value else params.cameraTranslation[1], -t]
        self.torealrotation = list(rotation)

        self.addObject("MeshSTLLoader",
                       filename=getLoadingLocation("../../../data/meshes/camera.stl", __file__),
                       translation=self.torealtranslation,
                       rotation=[45, 45, 0] if self.extended.value else [-45, 45, 0])
        self.addObject("OglModel", src=self.MeshSTLLoader.linkpath,
                       color=[0.4, 0.4, 0.4, 1.])


def createScene(rootnode):

    rootnode.addObject("DefaultAnimationLoop")
    rootnode.addChild(Camera())

    box = rootnode.addChild("Box")
    box.addObject("MeshSTLLoader",
                  filename=getLoadingLocation("../data/meshes/base-compact.stl", __file__))
    box.addObject("OglModel", src=box.MeshSTLLoader.linkpath, color=[1, 1, 1, 1])
